// SBML level 2 version 4

model Conradie2010_RPControl_CellCycle()
  // This model is from the article:
  // Restriction point control of the mammalian cell cycle via the cyclin E/Cdk2:p27 complex.
  // Conradie R, Bruggeman FJ, Ciliberto A, CsikÃ¡sz-Nagy A, NovÃ¡k B, Westerhoff HV, Snoep JL FEBS J.2010 Jan; 277(2): 357-67 20015233,
  // Abstract:
  // Numerous top-down kinetic models have been constructed to describe the cell cycle. These models have typically been constructed, validated and analyzed using model species (molecular intermediates and proteins) and phenotypic observations, and therefore do not focus on the individual model processes (reaction steps). We have developed a method to: (a) quantify the importance of each of the reaction steps in a kinetic model for the positioning of a switch point [i.e. the restriction point (RP)]; (b) relate this control of reaction steps to their effects on molecular species, using sensitivity and co-control analysis; and thereby (c) go beyond a correlation towards a causal relationship between molecular species and effects. The method is generic and can be applied to responses of any type, but is most useful for the analysis of dynamic and emergent responses such as switch points in the cell cycle. The strength of the analysis is illustrated for an existing mammalian cell cycle model focusing on the RP [Novak B, Tyson J (2004) J Theor Biol230, 563-579]. The reactions in the model with the highest RP control were those involved in: (a) the interplay between retinoblastoma protein and E2F transcription factor; (b) those synthesizing the delayed response genes and cyclin D/Cdk4 in response to growth signals; (c) the E2F-dependent cyclin E/Cdk2 synthesis reaction; as well as (d) p27 formation reactions. Nine of the 23 intermediates were shown to have a good correlation between their concentration control and RP control. Sensitivity and co-control analysis indicated that the strongest control of the RP is mediated via the cyclin E/Cdk2:p27 complex concentration. Any perturbation of the RP could be related to a change in the concentration of this complex; apparent effects of other molecular species were indirect and always worked through cyclin E/Cdk2:p27, indicating a causal relationship between this complex and the positioning of the RP.
  // The rate constants presented in the paper have units [per tenth of an hour] and have been changed here to [per hour] (e.g. k16 = 0.25 not 0.025); for further confirmation of the correctness of this change, see the original model (Novak, J Theor Biol 2004 230:563).
  // biomodels.db:MODEL1008240000
  // biomodels.db:BIOMD0000000265
  // isDescribedBy pubmed:20015233
  // isDerivedFrom pubmed:15363676
  // hasTaxon taxonomy:40674
  // hasVersion GO:0031575

  // Compartments:
  compartment cell = 1;  // GO:0005622

  // Species:
  species CDc20 in cell = 0.00220177; CDc20 is "Cdc20";  // uniprot:P26309
  species CDh1 in cell = 0.000653278; CDh1 is "Cdh1";  // uniprot:P12830
  species CYCA in cell = 1.4094; CYCA is "cyclin A:Cdk2";  // hasPart uniprot:P24941 interpro:IPR015453
  species CYCB in cell = 2.72898; CYCB is "cyclin B:Cdk2";  // hasPart uniprot:P24941 interpro:IPR015454
  species CYCD in cell = 0.43929; CYCD is "cyclin D:Cdk2";  // hasPart uniprot:P24941 interpro:IPR015451
  species CYCE in cell = 0.0229112; CYCE is "cyclin E:Cdk2";  // hasPart uniprot:P24864 uniprot:P24941
  species DRG in cell = 0.900533; DRG is "delayed-response genes";
  species var2 in cell = 0.989986; var2 is "E2F";  // uniprot:Q01094
  species var5 in cell = 0.00478911; var5 is "E2F:Rb";  // hasPart uniprot:Q01094 uniprot:P06400
  species ERG in cell = 0.0121809; ERG is "early-response genes";
  species GM in cell = 1.35565; GM is "general machinery for protein synthesis";
  species var1 in cell = 9.97574; var1 is "hypophosphorylated Rb";  // uniprot:P06400
  species CDc20T in cell = 2.36733; CDc20T is "inactive Cdc20";  // uniprot:P26309
  species MASS in cell = 1.68776; MASS is "mass";  // GO:0016049
  species P27 in cell = 0.00922806;  // uniprot:P46527
  species CA in cell = 0.0356927; CA is "P27:cyclin A:Cdk2";  // hasPart uniprot:P46527 uniprot:P24941 interpro:IPR015453
  species CD in cell = 0.010976; CD is "P27:cyclin D:Cdk2";  // hasPart uniprot:P46527 uniprot:P24941 interpro:IPR015451
  species CE in cell = 0.000542587; CE is "P27:cyclin E:Cdk2";  // hasPart uniprot:P46527 uniprot:P24864 uniprot:P24941
  species var3 in cell = 3.98594; var3 is "phosphorylated E2F";  // uniprot:Q01094
  species var6 in cell = 0.0192822; var6 is "phosphorylated E2F:Rb";  // hasPart uniprot:Q01094 uniprot:P06400
  species IEP in cell = 0.154655; IEP is "phosphorylated intermediary enzyme";  // GO:0005680
  species PPX in cell = 1;  // uniprot:P38698
  species var4 in cell = 0.000190871; var4 is "retinoblastoma protein (Rb)";  // uniprot:P06400

  // Parameters:
  Flag = 1 dimensionless;
  r31switch = 1 dimensionless;
  PP1A has dimensionless;
  V2 has dimensionless;
  V4 has dimensionless;
  V6 has dimensionless;
  V8 has dimensionless;
  CYCET has dimensionless;
  CYCDT has dimensionless;
  CYCAT has dimensionless;
  P27T has dimensionless;
  K10 = 5 per_hour;
  K8a = 0.1 per_hour;
  K8 = 2 per_hour;
  K25 = 1000 per_hour;
  K25R = 10 per_hour;
  J8 = 0.1 dimensionless;
  YE = 1 dimensionless;
  YB = 0.05 dimensionless;
  K30 = 20 per_hour;
  K2a = 0.05 per_hour;
  K2 = 20 per_hour;
  K2aa = 1 per_hour;
  K6a = 10 per_hour;
  K6 = 100 per_hour;
  HE = 0.5 dimensionless;
  HB = 1 dimensionless;
  HA = 0.5 dimensionless;
  RBT = 10 dimensionless;
  LD = 3.3 dimensionless;
  LE = 5 dimensionless;
  LB = 5 dimensionless;
  LA = 3 dimensionless;
  K20 = 10 per_hour;
  K21 = 1 dimensionless;
  PP1T = 1 dimensionless;
  FE = 25 dimensionless;
  FB = 2 dimensionless;
  K4 = 40 per_hour;
  GE = 0 dimensionless;
  GB = 1 dimensionless;
  GA = 0.3 dimensionless;
  K12 = 1.5 per_hour;
  E2FT = 5 dimensionless;
  K22 = 1 per_hour;
  K23a = 0.005 per_hour;
  K23 = 1 per_hour;
  K26 = 10000 per_hour;
  K26R = 200 per_hour;
  eps = 1 dimensionless;

  // Assignment rules:
  PP1A := PP1T/(1 + K21*(FB*CYCB + FE*(CYCA + CYCE)));
  V2 := K2aa*CDc20 + K2a*(1 - CDh1) + K2*CDh1;
  V4 := K4*(GA*CYCA + GB*CYCB + GE*CYCE);
  V6 := K6a + K6*(HA*CYCA + HB*CYCB + HE*CYCE);
  V8 := K8a + K8*(YB*CYCB + YE*(CYCA + CYCE))/(CYCET + J8);
  CYCET := CE + CYCE;
  CYCDT := CD + CYCD;
  CYCAT := CA + CYCA;
  P27T := CA + CD + CE + P27;

  // Reactions:
  v1: ERG -> ; k16*ERG;
    k16 = 0.25 per_hour;
  v2: DRG -> ; k18*DRG;
    k18 = 10 per_hour;
  v3: CD -> P27; K10*CD;
  v4: CYCD -> ; K10*CYCD;
  v5: CYCE + P27 -> CE; K25*CYCE*P27;
  v6: CYCA + P27 -> CA; K25*CYCA*P27;
  v7: CYCD + P27 -> CD; k24*CYCD*P27;
    k24 = 1000 per_hour;
  v8: CD -> CYCD + P27; k24r*CD;
    k24r = 10 per_hour;
  v9: CYCA -> ; K30*CDc20*CYCA;  // modifiers: CDc20
  v10: CA -> P27; K30*CA*CDc20;  // modifiers: CDc20
  v11: CE -> CYCE + P27; K25R*CE;
  v12: CA -> CYCA + P27; K25R*CA;
  v13: CE -> P27; V8*CE;  // modifiers: CYCB, CYCA, CYCE
  v14: CYCE -> ; V8*CYCE;  // modifiers: CYCB, CYCA, CE
  v15: P27 -> ; V6*P27;  // modifiers: CYCA, CYCB, CYCE
  v16: CE -> CYCE; V6*CE;  // modifiers: CYCA, CYCB
  v17: CD -> CYCD; V6*CD;  // modifiers: CYCA, CYCB, CYCE
  v18: CA -> CYCA; V6*CA;  // modifiers: CYCB, CYCE
  v19: CYCB -> ; V2*CYCB;  // modifiers: CDc20, CDh1
  v20: -> CDh1; (K3a + K3*CDc20)*(1 - CDh1)/(1 + J3 - CDh1);  // modifiers: CDc20
    J3 = 0.01 dimensionless; K3 = 140 per_hour; K3a = 7.5 per_hour;
  v21: CDh1 -> ; V4*CDh1/(J4 + CDh1);  // modifiers: CYCA, CYCB, CYCE
    J4 = 0.01 dimensionless;
  v22: PPX -> ; K34*PPX;
    K34 = 0.05 per_hour;
  v23: -> IEP; K31*CYCB*(1 - IEP)/(1 + J31 - IEP);  // modifiers: CYCB
    J31 = 0.01 dimensionless; K31 = 0.7 per_hour;
  v24: IEP -> ; K32*IEP*PPX/(J32 + IEP);  // modifiers: PPX
    J32 = 0.01 dimensionless; K32 = 1.8 per_hour;
  v25: CDc20T -> ; K12*CDc20T;
  v26: -> CDc20; K13*(-CDc20 + CDc20T)*IEP/(J13 - CDc20 + CDc20T);  // modifiers: CDc20T, IEP
    J13 = 0.005 dimensionless; K13 = 5 per_hour;
  v27: CDc20 -> ; K14*CDc20/(J14 + CDc20);
    J14 = 0.005 dimensionless; K14 = 2.5 per_hour;
  v28: CDc20 -> ; K12*CDc20;
  v29: var5 -> var1 + var2; K20*(LA*CYCA + LB*CYCB + LD*(CD + CYCD) + LE*CYCE)*var5;  // modifiers: CYCA, CYCB, CD, CYCD, CYCE
  v30: var6 -> var1 + var3; K20*(LA*CYCA + LB*CYCB + LD*(CD + CYCD) + LE*CYCE)*var6;  // modifiers: CYCA, CYCB, CD, CYCD, CYCE
  v31: -> GM; K27*MASS*r31switch;  // modifiers: MASS
    K27 = 0.2 per_hour;
  v32: GM -> ; K28*GM;
    K28 = 0.2 per_hour;
  v33: -> MASS; eps*MU*GM;  // modifiers: GM
    MU = 0.061 per_hour;
  v34: -> ERG; eps*k15/(1 + DRG^2/J15^2);  // modifiers: DRG
    J15 = 0.1 dimensionless; k15 = 0.25 per_hour;
  v35: -> CDc20T; eps*(K11a + K11*CYCB);  // modifiers: CYCB
    K11 = 1.5 per_hour; K11a = 0 per_hour;
  v36: -> CYCA; eps*K29*MASS*var2;  // modifiers: MASS, var2
    K29 = 0.05 per_hour;
  v37: -> PPX; eps*K33;
    K33 = 0.05 per_hour;
  v38: -> CYCE; eps*(K7a + K7*var2);  // modifiers: var2
    K7 = 0.6 per_hour; K7a = 0 per_hour;
  v39: -> CYCD; eps*K9*DRG;  // modifiers: DRG
    K9 = 2.5 per_hour;
  v40: -> P27; eps*K5;
    K5 = 20 per_hour;
  v41: -> DRG; eps*(k17*DRG^2/(J17^2*(1 + DRG^2/J17^2)) + k17a*ERG);  // modifiers: ERG
    J17 = 0.3 dimensionless; k17 = 10 per_hour; k17a = 0.35 per_hour;
  v42: -> CYCB; eps*(K1a + K1*CYCB^2/(J1^2*(1 + CYCB^2/J1^2)));
    J1 = 0.1 dimensionless; K1 = 0.6 per_hour; K1a = 0.1 per_hour;
  v43: var4 -> var1; K20*(LA*CYCA + LB*CYCB + LD*(CD + CYCD) + LE*CYCE)*var4;  // modifiers: CYCA, CYCB, CD, CYCD, CYCE
  v44: var1 -> var4; (K19*PP1A + K19a*(PP1T - PP1A))*var1;  // modifiers: CYCB, CYCA, CYCE
    K19 = 20 per_hour; K19a = 0 per_hour;
  v45: var5 -> var2 + var4; K26R*var5;
  v46: var2 -> var3; (K23a + K23*(CYCA + CYCB))*var2;  // modifiers: CYCA, CYCB
  v47: var3 -> var2; K22*var3;
  v48: var2 + var4 -> var5; K26*var2*var4;
  v49: var6 -> var3 + var4; K26R*var6;
  v50: var3 + var4 -> var6; K26*var3*var4;
  v51: var6 -> var5; K22*var6;
  v52: var5 -> var6; (K23a + K23*(CYCA + CYCB))*var5;  // modifiers: CYCA, CYCB

  // Events:
  r31Ifpart1: at ((var4 + var5 + var6)*(var1 + var4 + var5 + var6)^(-1) > 0.8): r31switch = 0;
  r31Ifpart2: at ((var4 + var5 + var6)*(var1 + var4 + var5 + var6)^(-1) < 0.8): r31switch = 1;
  divisionEvent: at ((CDh1 > 0.2) && (Flag == 1)): GM = 0.5*GM, MASS = 0.5*MASS, Flag = 2;
  checkEvent: at ((CDh1 < 0.2) && (Flag == 2)): Flag = 1;

  // Unit definitions:
  unit substance = dimensionless; substance is "arbitrary units";
  unit time = 3600 second; time is "hour";
  unit per_hour = 1 / (3600 second);
end
